// SBML level 3 version 2

model G6PDH2r()
  // Glucose 6-phosphate dehydrogenase

  // Compartments:
  compartment c; c is "Cytosol";

  // Species:
  species M_g6p_c in c = 0.0486; M_g6p_c is "D-Glucose 6-phosphate";
  species M__6pgl_c in c = 0.00175424; M__6pgl_c is "6-Phospho-D-gluco-1,5-lactone";
  species M_atp_c in c = 1.6; M_atp_c is "ATP";
  species M_nadp_c in c = 0.0002; M_nadp_c is "Nicotinamide adenine dinucleotide phosphate";
  species M_nadph_c in c = 0.0658; M_nadph_c is "Nicotinamide adenine dinucleotide phosphate - reduced";
  species M_h_c in c = 8.99757e-5; M_h_c is "H+";
  species M_g6pdh2r_c in c = 2.3680761e-5; M_g6pdh2r_c is "G6PDH2r";
  species M_g6pdh2r_G_c in c = 3.9638138e-5; M_g6pdh2r_G_c is "G6PDH2r-g6p complex";
  species M_g6pdh2r_GN_c in c = 6.8376e-8; M_g6pdh2r_GN_c is "G6PDH2r-g6p-nadp complex";
  species M_g6pdh2r_GN_P_c in c = 9.292824e-6; M_g6pdh2r_GN_P_c is "G6PDH2r-_6pgl-nadph complex";
  species M_g6pdh2r_G_P_c in c = 1.276587e-6; M_g6pdh2r_G_P_c is "G6PDH2r-_6pgl complex";
  species M_g6pdh2r_A_CI_c in c = 0.000861118567; M_g6pdh2r_A_CI_c is "G6PDH2r-atp complex";
  species M_g6pdh2r_N_PI_c in c = 6.4924752e-5; M_g6pdh2r_N_PI_c is "G6PDH2r-nadph complex";

  // Parameters:
  kf_R_G6PDH2r_1 = 1000000;
  kf_R_G6PDH2r_2 = 1000000;
  kf_R_G6PDH2r_3 = 2603675;
  kf_R_G6PDH2r_4 = 471114;
  kf_R_G6PDH2r_5 = 31681489;
  kf_R_G6PDH2r_6 = 162428;
  kf_R_G6PDH2r_7 = 3567413;
  Keq_R_G6PDH2r_1 = 41.66667;
  Keq_R_G6PDH2r_2 = 22.72727;
  Keq_R_G6PDH2r_3 = 37.03704;
  Keq_R_G6PDH2r_4 = 0.05;
  Keq_R_G6PDH2r_5 = 52.63158;
  Keq_R_G6PDH2r_6 = 0.0105;
  Keq_R_G6PDH2r_7 = 977.1429;

  // Reactions:
  R_G6PDH2r_1: M_g6pdh2r_c + M_nadph_c -> M_g6pdh2r_N_PI_c; kf_R_G6PDH2r_1*(M_g6pdh2r_c*M_nadph_c - M_g6pdh2r_N_PI_c/Keq_R_G6PDH2r_1); R_G6PDH2r_1 is "g6pdh2r-nadph binding";
  R_G6PDH2r_2: M_g6pdh2r_c + M_atp_c -> M_g6pdh2r_A_CI_c; kf_R_G6PDH2r_2*(M_atp_c*M_g6pdh2r_c - M_g6pdh2r_A_CI_c/Keq_R_G6PDH2r_2); R_G6PDH2r_2 is "g6pdh2r-atp binding";
  R_G6PDH2r_3: M_g6pdh2r_c + M_g6p_c -> M_g6pdh2r_G_c; kf_R_G6PDH2r_3*(M_g6p_c*M_g6pdh2r_c - M_g6pdh2r_G_c/Keq_R_G6PDH2r_3); R_G6PDH2r_3 is "g6pdh2r-g6p binding";
  R_G6PDH2r_4: M_g6pdh2r_G_P_c -> M__6pgl_c + M_g6pdh2r_c; kf_R_G6PDH2r_4*(M_g6pdh2r_G_P_c - M__6pgl_c*M_g6pdh2r_c/Keq_R_G6PDH2r_4); R_G6PDH2r_4 is "g6pdh2r_G_P-_6pgl release";
  R_G6PDH2r_5: M_g6pdh2r_G_c + M_nadp_c -> M_g6pdh2r_GN_c; kf_R_G6PDH2r_5*(M_g6pdh2r_G_c*M_nadp_c - M_g6pdh2r_GN_c/Keq_R_G6PDH2r_5); R_G6PDH2r_5 is "g6pdh2r_G-nadp binding";
  R_G6PDH2r_6: M_g6pdh2r_GN_P_c -> M_nadph_c + M_g6pdh2r_G_P_c; kf_R_G6PDH2r_6*(M_g6pdh2r_GN_P_c - M_g6pdh2r_G_P_c*M_nadph_c/Keq_R_G6PDH2r_6); R_G6PDH2r_6 is "g6pdh2r_GN_P-nadph release";
  R_G6PDH2r_7: M_g6pdh2r_GN_c -> M_g6pdh2r_GN_P_c + M_h_c; kf_R_G6PDH2r_7*(M_g6pdh2r_GN_c - M_g6pdh2r_GN_P_c/Keq_R_G6PDH2r_7); R_G6PDH2r_7 is "g6pdh2r_GN catalyzation";
end
