// SBML level 3 version 2

model PFK()
  // Phosphofructokinase

  // Compartments:
  compartment c; c is "Cytosol";

  // Species:
  species M_f6p_c in c = 0.0198; M_f6p_c is "D-Fructose 6-phosphate";
  species M_fdp_c in c = 0.0146; M_fdp_c is "D-Fructose 1,6-bisphosphate";
  species M_amp_c in c = 0.0867281; M_amp_c is "AMP";
  species M_adp_c in c = 0.29; M_adp_c is "ADP";
  species M_atp_c in c = 1.6; M_atp_c is "ATP";
  species M_h_c in c = 8.99757e-5; M_h_c is "H+";
  species M_pfk_R0_c in c = 6.9014e-8; M_pfk_R0_c is "PFK";
  species M_pfk_R0_A_c in c = 8.1613e-8; M_pfk_R0_A_c is "PFK-atp complex";
  species M_pfk_R0_AF_c in c = 3.232e-9; M_pfk_R0_AF_c is "PFK-atp-f6p complex";
  species M_pfk_R1_c in c = 7.25509e-7; M_pfk_R1_c is "PFK; 1 amp";
  species M_pfk_R1_A_c in c = 8.57957e-7; M_pfk_R1_A_c is "PFK-atp complex; 1 amp";
  species M_pfk_R1_AF_c in c = 3.3974e-8; M_pfk_R1_AF_c is "PFK-atp-f6p complex; 1 amp";
  species M_pfk_R2_c in c = 2.86009e-6; M_pfk_R2_c is "PFK; 2 amp";
  species M_pfk_R2_A_c in c = 3.382225e-6; M_pfk_R2_A_c is "PFK-atp complex; 2 amp";
  species M_pfk_R2_AF_c in c = 1.33933e-7; M_pfk_R2_AF_c is "PFK-atp-f6p complex; 2 amp";
  species M_pfk_R3_c in c = 5.011115e-6; M_pfk_R3_c is "PFK; 3 amp";
  species M_pfk_R3_A_c in c = 5.925939e-6; M_pfk_R3_A_c is "PFK-atp complex; 3 amp";
  species M_pfk_R3_AF_c in c = 2.34662e-7; M_pfk_R3_AF_c is "PFK-atp-f6p complex; 3 amp";
  species M_pfk_R4_c in c = 3.292458e-6; M_pfk_R4_c is "PFK; 4 amp";
  species M_pfk_R4_A_c in c = 3.893526e-6; M_pfk_R4_A_c is "PFK-atp complex; 4 amp";
  species M_pfk_R4_AF_c in c = 1.5418e-7; M_pfk_R4_AF_c is "PFK-atp-f6p complex; 4 amp";
  species M_pfk_T0_c in c = 7.6e-11; M_pfk_T0_c is "PFK";
  species M_pfk_T1_c in c = 4.859e-9; M_pfk_T1_c is "PFK; 1 atp";
  species M_pfk_T2_c in c = 1.16606e-7; M_pfk_T2_c is "PFK; 2 atp";
  species M_pfk_T3_c in c = 1.243797e-6; M_pfk_T3_c is "PFK; 3 atp";
  species M_pfk_T4_c in c = 4.975186e-6; M_pfk_T4_c is "PFK; 4 atp";

  // Parameters:
  kf_R_PFK_L = 1000000000000;
  Keq_R_PFK_R03 = INF;
  Keq_R_PFK_R13 = INF;
  Keq_R_PFK_R23 = INF;
  Keq_R_PFK_R33 = INF;
  Keq_R_PFK_R43 = INF;
  Keq_R_PFK_L = 0.0011;
  Keq_PFK_F = 10;
  Keq_PFK_A = 14.70588;
  Keq_PFK_I = 10;
  Keq_PFK_ACT = 30.30303;
  Keq_R_PFK_L = 0.0011;
  kf_PFK = 2000064;
  kf_PFK_A = 61635;
  kf_PFK_F = 5000028;
  kf_PFK_I = 1000000;
  kf_PFK_ACT = 1000000;

  // Reactions:
  R_PFK_R01: M_pfk_R0_c + M_atp_c -> M_pfk_R0_A_c; kf_PFK_A*(M_atp_c*M_pfk_R0_c - M_pfk_R0_A_c/Keq_PFK_A); R_PFK_R01 is "pfk_R0-atp binding";
  R_PFK_R02: M_pfk_R0_A_c + M_f6p_c -> M_pfk_R0_AF_c; kf_PFK_F*(M_f6p_c*M_pfk_R0_A_c - M_pfk_R0_AF_c/Keq_PFK_F); R_PFK_R02 is "pfk_R0_A-f6p binding";
  R_PFK_R03: M_pfk_R0_AF_c => M_pfk_R0_c + M_adp_c + M_fdp_c + M_h_c; M_pfk_R0_AF_c*kf_PFK; R_PFK_R03 is "pfk_R0_AF catalyzation";
  R_PFK_R10: M_pfk_R0_c + M_amp_c -> M_pfk_R1_c; kf_PFK_ACT*(4*M_amp_c*M_pfk_R0_c - M_pfk_R1_c/Keq_PFK_ACT); R_PFK_R10 is "pfk_R0-amp binding";
  R_PFK_T1: M_pfk_T0_c + M_atp_c -> M_pfk_T1_c; kf_PFK_I*(4*M_atp_c*M_pfk_T0_c - M_pfk_T1_c/Keq_PFK_I); R_PFK_T1 is "pfk_T0-atp binding";
  R_PFK_R11: M_pfk_R1_c + M_atp_c -> M_pfk_R1_A_c; kf_PFK_A*(M_atp_c*M_pfk_R1_c - M_pfk_R1_A_c/Keq_PFK_A); R_PFK_R11 is "pfk_R1-atp binding";
  R_PFK_R12: M_pfk_R1_A_c + M_f6p_c -> M_pfk_R1_AF_c; kf_PFK_F*(M_f6p_c*M_pfk_R1_A_c - M_pfk_R1_AF_c/Keq_PFK_F); R_PFK_R12 is "pfk_R1_A-f6p binding";
  R_PFK_R13: M_pfk_R1_AF_c => M_pfk_R1_c + M_adp_c + M_fdp_c + M_h_c; M_pfk_R1_AF_c*kf_PFK; R_PFK_R13 is "pfk_R1_AF catalyzation";
  R_PFK_R20: M_pfk_R1_c + M_amp_c -> M_pfk_R2_c; kf_PFK_ACT*(3*M_amp_c*M_pfk_R1_c - 2*M_pfk_R2_c/Keq_PFK_ACT); R_PFK_R20 is "pfk_R1-amp binding";
  R_PFK_T2: M_pfk_T1_c + M_atp_c -> M_pfk_T2_c; kf_PFK_I*(3*M_atp_c*M_pfk_T1_c - 2*M_pfk_T2_c/Keq_PFK_I); R_PFK_T2 is "pfk_T1-atp binding";
  R_PFK_R21: M_pfk_R2_c + M_atp_c -> M_pfk_R2_A_c; kf_PFK_A*(M_atp_c*M_pfk_R2_c - M_pfk_R2_A_c/Keq_PFK_A); R_PFK_R21 is "pfk_R2-atp binding";
  R_PFK_R22: M_pfk_R2_A_c + M_f6p_c -> M_pfk_R2_AF_c; kf_PFK_F*(M_f6p_c*M_pfk_R2_A_c - M_pfk_R2_AF_c/Keq_PFK_F); R_PFK_R22 is "pfk_R2_A-f6p binding";
  R_PFK_R23: M_pfk_R2_AF_c => M_pfk_R2_c + M_adp_c + M_fdp_c + M_h_c; M_pfk_R2_AF_c*kf_PFK; R_PFK_R23 is "pfk_R2_AF catalyzation";
  R_PFK_R30: M_pfk_R2_c + M_amp_c -> M_pfk_R3_c; kf_PFK_ACT*(2*M_amp_c*M_pfk_R2_c - 3*M_pfk_R3_c/Keq_PFK_ACT); R_PFK_R30 is "pfk_R2-amp binding";
  R_PFK_T3: M_pfk_T2_c + M_atp_c -> M_pfk_T3_c; kf_PFK_I*(2*M_atp_c*M_pfk_T2_c - 3*M_pfk_T3_c/Keq_PFK_I); R_PFK_T3 is "pfk_T2-atp binding";
  R_PFK_R31: M_pfk_R3_c + M_atp_c -> M_pfk_R3_A_c; kf_PFK_A*(M_atp_c*M_pfk_R3_c - M_pfk_R3_A_c/Keq_PFK_A); R_PFK_R31 is "pfk_R3-atp binding";
  R_PFK_R32: M_pfk_R3_A_c + M_f6p_c -> M_pfk_R3_AF_c; kf_PFK_F*(M_f6p_c*M_pfk_R3_A_c - M_pfk_R3_AF_c/Keq_PFK_F); R_PFK_R32 is "pfk_R3_A-f6p binding";
  R_PFK_R33: M_pfk_R3_AF_c => M_pfk_R3_c + M_adp_c + M_fdp_c + M_h_c; M_pfk_R3_AF_c*kf_PFK; R_PFK_R33 is "pfk_R3_AF catalyzation";
  R_PFK_R40: M_pfk_R3_c + M_amp_c -> M_pfk_R4_c; kf_PFK_ACT*(M_amp_c*M_pfk_R3_c - 4*M_pfk_R4_c/Keq_PFK_ACT); R_PFK_R40 is "pfk_R3-amp binding";
  R_PFK_T4: M_pfk_T3_c + M_atp_c -> M_pfk_T4_c; kf_PFK_I*(M_atp_c*M_pfk_T3_c - 4*M_pfk_T4_c/Keq_PFK_I); R_PFK_T4 is "pfk_T3-atp binding";
  R_PFK_R41: M_pfk_R4_c + M_atp_c -> M_pfk_R4_A_c; kf_PFK_A*(M_atp_c*M_pfk_R4_c - M_pfk_R4_A_c/Keq_PFK_A); R_PFK_R41 is "pfk_R4-atp binding";
  R_PFK_R42: M_pfk_R4_A_c + M_f6p_c -> M_pfk_R4_AF_c; kf_PFK_F*(M_f6p_c*M_pfk_R4_A_c - M_pfk_R4_AF_c/Keq_PFK_F); R_PFK_R42 is "pfk_R4_A-f6p binding";
  R_PFK_R43: M_pfk_R4_AF_c => M_pfk_R4_c + M_adp_c + M_fdp_c + M_h_c; M_pfk_R4_AF_c*kf_PFK; R_PFK_R43 is "pfk_R4_AF catalyzation";
  R_PFK_L: M_pfk_R0_c -> M_pfk_T0_c; kf_R_PFK_L*(M_pfk_R0_c - M_pfk_T0_c/Keq_R_PFK_L); R_PFK_L is "pfk_R0-pfk_T0 transition";
end
