// SBML level 3 version 1

model PYK()
  // Pyruvate Kinase

  // Compartments:
  compartment c; c is "Cytosol";

  // Species:
  species M_pep_c in c = 0.017; M_pep_c is "Phosphoenolpyruvate";
  species M_adp_c in c = 0.28999996; M_adp_c is "ADP";
  species M_fdp_c in c = 0.0146; M_fdp_c is "D-Fructose 1,6-bisphosphate";
  species M_atp_c in c = 1.6; M_atp_c is "ATP";
  species M_pyr_c in c = 0.060301; M_pyr_c is "Pyruvate";
  species M_h_c in c = 8.998e-5; M_h_c is "H+";
  // enzyme_module_id: PYK
  species M_pyk_R0_c in c = 1.40856e-7; M_pyk_R0_c is "PYK";
  // bound_catalytic: 1 M_adp_c
  // enzyme_module_id: PYK
  species M_pyk_R0_A_c in c = 8.518e-8; M_pyk_R0_A_c is "PYK-adp complex";
  // bound_catalytic: 1 M_pep_c
  // enzyme_module_id: PYK
  species M_pyk_R0_P_c in c = 8.638e-9; M_pyk_R0_P_c is "PYK-pep complex";
  // bound_catalytic: 1 M_adp_c; 1 M_pep_c
  // enzyme_module_id: PYK
  species M_pyk_R0_AP_c in c = 4.333e-9; M_pyk_R0_AP_c is "PYK-adp-pep complex";
  // enzyme_module_id: PYK
  species M_pyk_T0_c in c = 2.676267e-6; M_pyk_T0_c is "PYK";
  // bound_effectors: 1 M_fdp_c
  // enzyme_module_id: PYK
  species M_pyk_R1_c in c = 1.6452e-6; M_pyk_R1_c is "PYK; 1 fdp_c";
  // bound_catalytic: 1 M_adp_c
  // bound_effectors: 1 M_fdp_c
  // enzyme_module_id: PYK
  species M_pyk_R1_A_c in c = 9.94903e-7; M_pyk_R1_A_c is "PYK-adp complex; 1 fdp_c";
  // bound_catalytic: 1 M_pep_c
  // bound_effectors: 1 M_fdp_c
  // enzyme_module_id: PYK
  species M_pyk_R1_P_c in c = 1.00888e-7; M_pyk_R1_P_c is "PYK-pep complex; 1 fdp_c";
  // bound_catalytic: 1 M_adp_c; 1 M_pep_c
  // bound_effectors: 1 M_fdp_c
  // enzyme_module_id: PYK
  species M_pyk_R1_AP_c in c = 5.0613e-8; M_pyk_R1_AP_c is "PYK-adp-pep complex; 1 fdp_c";
  // bound_effectors: 1 M_atp_c
  // enzyme_module_id: PYK
  species M_pyk_T1_c in c = 5.052539e-6; M_pyk_T1_c is "PYK; 1 atp_c";
  // bound_effectors: 2 M_fdp_c
  // enzyme_module_id: PYK
  species M_pyk_R2_c in c = 7.205975e-6; M_pyk_R2_c is "PYK; 2 fdp_c";
  // bound_catalytic: 1 M_adp_c
  // bound_effectors: 2 M_fdp_c
  // enzyme_module_id: PYK
  species M_pyk_R2_A_c in c = 4.357676e-6; M_pyk_R2_A_c is "PYK-adp complex; 2 fdp_c";
  // bound_catalytic: 1 M_pep_c
  // bound_effectors: 2 M_fdp_c
  // enzyme_module_id: PYK
  species M_pyk_R2_P_c in c = 4.41889e-7; M_pyk_R2_P_c is "PYK-pep complex; 2 fdp_c";
  // bound_catalytic: 1 M_adp_c; 1 M_pep_c
  // bound_effectors: 2 M_fdp_c
  // enzyme_module_id: PYK
  species M_pyk_R2_AP_c in c = 2.21685e-7; M_pyk_R2_AP_c is "PYK-adp-pep complex; 2 fdp_c";
  // bound_effectors: 2 M_atp_c
  // enzyme_module_id: PYK
  species M_pyk_T2_c in c = 3.577019e-6; M_pyk_T2_c is "PYK; 2 atp_c";
  // bound_effectors: 3 M_fdp_c
  // enzyme_module_id: PYK
  species M_pyk_R3_c in c = 1.4027631e-5; M_pyk_R3_c is "PYK; 3 fdp_c";
  // bound_catalytic: 1 M_adp_c
  // bound_effectors: 3 M_fdp_c
  // enzyme_module_id: PYK
  species M_pyk_R3_A_c in c = 8.482944e-6; M_pyk_R3_A_c is "PYK-adp complex; 3 fdp_c";
  // bound_catalytic: 1 M_pep_c
  // bound_effectors: 3 M_fdp_c
  // enzyme_module_id: PYK
  species M_pyk_R3_P_c in c = 8.60211e-7; M_pyk_R3_P_c is "PYK-pep complex; 3 fdp_c";
  // bound_catalytic: 1 M_adp_c; 1 M_pep_c
  // bound_effectors: 3 M_fdp_c
  // enzyme_module_id: PYK
  species M_pyk_R3_AP_c in c = 4.31546e-7; M_pyk_R3_AP_c is "PYK-adp-pep complex; 3 fdp_c";
  // bound_effectors: 3 M_atp_c
  // enzyme_module_id: PYK
  species M_pyk_T3_c in c = 1.125512e-6; M_pyk_T3_c is "PYK; 3 atp_c";
  // bound_effectors: 4 M_fdp_c
  // enzyme_module_id: PYK
  species M_pyk_R4_c in c = 1.0240171e-5; M_pyk_R4_c is "PYK; 4 fdp_c";
  // bound_catalytic: 1 M_adp_c
  // bound_effectors: 4 M_fdp_c
  // enzyme_module_id: PYK
  species M_pyk_R4_A_c in c = 6.192549e-6; M_pyk_R4_A_c is "PYK-adp complex; 4 fdp_c";
  // bound_catalytic: 1 M_pep_c
  // bound_effectors: 4 M_fdp_c
  // enzyme_module_id: PYK
  species M_pyk_R4_P_c in c = 6.27954e-7; M_pyk_R4_P_c is "PYK-pep complex; 4 fdp_c";
  // bound_catalytic: 1 M_adp_c; 1 M_pep_c
  // bound_effectors: 4 M_fdp_c
  // enzyme_module_id: PYK
  species M_pyk_R4_AP_c in c = 3.15029e-7; M_pyk_R4_AP_c is "PYK-adp-pep complex; 4 fdp_c";
  // bound_effectors: 4 M_atp_c
  // enzyme_module_id: PYK
  species M_pyk_T4_c in c = 1.32804e-7; M_pyk_T4_c is "PYK; 4 atp_c";

  // Parameters:
  cobra_default_lb = -1000 mmol_per_gDW_per_hr;
  cobra_default_ub = 1000 mmol_per_gDW_per_hr;
  cobra_0_bound = 0 mmol_per_gDW_per_hr;
  minus_inf = -INF; minus_inf has mmol_per_gDW_per_hr;
  plus_inf = INF; plus_inf has mmol_per_gDW_per_hr;
  Keq_PYK_P = 4.444444;
  Keq_PYK_A = 2.109705;
  Keq_PYK_I = 0.2949853;
  Keq_PYK_ACT = 200;
  kf_PYK = 2189198;
  kf_PYK_A = 10268302;
  kf_PYK_P = 10265064;
  kf_PYK_I = 1000000;
  kf_PYK_ACT = 1000000;

  // Reactions:
  // enzyme_module_id: PYK
  R_PYK_R01: M_pyk_R0_c + M_pep_c -> M_pyk_R0_P_c; kf_PYK_P*(Keq_PYK_P*M_pep_c*M_pyk_R0_c - M_pyk_R0_P_c)/Keq_PYK_P; R_PYK_R01 is "pyk_R0-pep binding";
  // enzyme_module_id: PYK
  R_PYK_R02: M_pyk_R0_c + M_adp_c -> M_pyk_R0_A_c; kf_PYK_A*(Keq_PYK_A*M_adp_c*M_pyk_R0_c - M_pyk_R0_A_c)/Keq_PYK_A; R_PYK_R02 is "pyk_R0-adp binding";
  // enzyme_module_id: PYK
  R_PYK_R03: M_pyk_R0_A_c + M_pep_c -> M_pyk_R0_AP_c; kf_PYK_P*(Keq_PYK_P*M_pep_c*M_pyk_R0_A_c - M_pyk_R0_AP_c)/Keq_PYK_P; R_PYK_R03 is "pyk_R0_A-pep binding";
  // enzyme_module_id: PYK
  R_PYK_R04: M_pyk_R0_P_c + M_adp_c -> M_pyk_R0_AP_c; kf_PYK_A*(Keq_PYK_A*M_adp_c*M_pyk_R0_P_c - M_pyk_R0_AP_c)/Keq_PYK_A; R_PYK_R04 is "pyk_R0_P-adp binding";
  // enzyme_module_id: PYK
  R_PYK_R05: M_pyk_R0_AP_c + M_h_c => M_pyk_R0_c + M_atp_c + M_pyr_c; M_pyk_R0_AP_c*kf_PYK; R_PYK_R05 is "pyk_R0_AP catalyzation";
    Keq_PYK_R05 = INF;
  // enzyme_module_id: PYK
  R_PYK_R10: M_pyk_R0_c + M_fdp_c -> M_pyk_R1_c; kf_PYK_ACT*(4*Keq_PYK_ACT*M_fdp_c*M_pyk_R0_c - M_pyk_R1_c)/Keq_PYK_ACT; R_PYK_R10 is "pyk_R0-fdp binding";
  // enzyme_module_id: PYK
  R_PYK_R11: M_pyk_R1_c + M_pep_c -> M_pyk_R1_P_c; kf_PYK_P*(Keq_PYK_P*M_pep_c*M_pyk_R1_c - M_pyk_R1_P_c)/Keq_PYK_P; R_PYK_R11 is "pyk_R1-pep binding";
  // enzyme_module_id: PYK
  R_PYK_R12: M_pyk_R1_c + M_adp_c -> M_pyk_R1_A_c; kf_PYK_A*(Keq_PYK_A*M_adp_c*M_pyk_R1_c - M_pyk_R1_A_c)/Keq_PYK_A; R_PYK_R12 is "pyk_R1-adp binding";
  // enzyme_module_id: PYK
  R_PYK_R13: M_pyk_R1_A_c + M_pep_c -> M_pyk_R1_AP_c; kf_PYK_P*(Keq_PYK_P*M_pep_c*M_pyk_R1_A_c - M_pyk_R1_AP_c)/Keq_PYK_P; R_PYK_R13 is "pyk_R1_A-pep binding";
  // enzyme_module_id: PYK
  R_PYK_R14: M_pyk_R1_P_c + M_adp_c -> M_pyk_R1_AP_c; kf_PYK_A*(Keq_PYK_A*M_adp_c*M_pyk_R1_P_c - M_pyk_R1_AP_c)/Keq_PYK_A; R_PYK_R14 is "pyk_R1_P-adp binding";
  // enzyme_module_id: PYK
  R_PYK_R15: M_pyk_R1_AP_c + M_h_c => M_pyk_R1_c + M_atp_c + M_pyr_c; M_pyk_R1_AP_c*kf_PYK; R_PYK_R15 is "pyk_R1_AP catalyzation";
    Keq_PYK_R15 = INF;
  // enzyme_module_id: PYK
  R_PYK_R20: M_pyk_R1_c + M_fdp_c -> M_pyk_R2_c; kf_PYK_ACT*(3*Keq_PYK_ACT*M_fdp_c*M_pyk_R1_c - 2*M_pyk_R2_c)/Keq_PYK_ACT; R_PYK_R20 is "pyk_R1-fdp binding";
  // enzyme_module_id: PYK
  R_PYK_R21: M_pyk_R2_c + M_pep_c -> M_pyk_R2_P_c; kf_PYK_P*(Keq_PYK_P*M_pep_c*M_pyk_R2_c - M_pyk_R2_P_c)/Keq_PYK_P; R_PYK_R21 is "pyk_R2-pep binding";
  // enzyme_module_id: PYK
  R_PYK_R22: M_pyk_R2_c + M_adp_c -> M_pyk_R2_A_c; kf_PYK_A*(Keq_PYK_A*M_adp_c*M_pyk_R2_c - M_pyk_R2_A_c)/Keq_PYK_A; R_PYK_R22 is "pyk_R2-adp binding";
  // enzyme_module_id: PYK
  R_PYK_R23: M_pyk_R2_A_c + M_pep_c -> M_pyk_R2_AP_c; kf_PYK_P*(Keq_PYK_P*M_pep_c*M_pyk_R2_A_c - M_pyk_R2_AP_c)/Keq_PYK_P; R_PYK_R23 is "pyk_R2_A-pep binding";
  // enzyme_module_id: PYK
  R_PYK_R24: M_pyk_R2_P_c + M_adp_c -> M_pyk_R2_AP_c; kf_PYK_A*(Keq_PYK_A*M_adp_c*M_pyk_R2_P_c - M_pyk_R2_AP_c)/Keq_PYK_A; R_PYK_R24 is "pyk_R2_P-adp binding";
  // enzyme_module_id: PYK
  R_PYK_R25: M_pyk_R2_AP_c + M_h_c => M_pyk_R2_c + M_atp_c + M_pyr_c; M_pyk_R2_AP_c*kf_PYK; R_PYK_R25 is "pyk_R2_AP catalyzation";
    Keq_PYK_R25 = INF;
  // enzyme_module_id: PYK
  R_PYK_R30: M_pyk_R2_c + M_fdp_c -> M_pyk_R3_c; kf_PYK_ACT*(2*Keq_PYK_ACT*M_fdp_c*M_pyk_R2_c - 3*M_pyk_R3_c)/Keq_PYK_ACT; R_PYK_R30 is "pyk_R2-fdp binding";
  // enzyme_module_id: PYK
  R_PYK_R31: M_pyk_R3_c + M_pep_c -> M_pyk_R3_P_c; kf_PYK_P*(Keq_PYK_P*M_pep_c*M_pyk_R3_c - M_pyk_R3_P_c)/Keq_PYK_P; R_PYK_R31 is "pyk_R3-pep binding";
  // enzyme_module_id: PYK
  R_PYK_R32: M_pyk_R3_c + M_adp_c -> M_pyk_R3_A_c; kf_PYK_A*(Keq_PYK_A*M_adp_c*M_pyk_R3_c - M_pyk_R3_A_c)/Keq_PYK_A; R_PYK_R32 is "pyk_R3-adp binding";
  // enzyme_module_id: PYK
  R_PYK_R33: M_pyk_R3_A_c + M_pep_c -> M_pyk_R3_AP_c; kf_PYK_P*(Keq_PYK_P*M_pep_c*M_pyk_R3_A_c - M_pyk_R3_AP_c)/Keq_PYK_P; R_PYK_R33 is "pyk_R3_A-pep binding";
  // enzyme_module_id: PYK
  R_PYK_R34: M_pyk_R3_P_c + M_adp_c -> M_pyk_R3_AP_c; kf_PYK_A*(Keq_PYK_A*M_adp_c*M_pyk_R3_P_c - M_pyk_R3_AP_c)/Keq_PYK_A; R_PYK_R34 is "pyk_R3_P-adp binding";
  // enzyme_module_id: PYK
  R_PYK_R35: M_pyk_R3_AP_c + M_h_c => M_pyk_R3_c + M_atp_c + M_pyr_c; M_pyk_R3_AP_c*kf_PYK; R_PYK_R35 is "pyk_R3_AP catalyzation";
    Keq_PYK_R35 = INF;
  // enzyme_module_id: PYK
  R_PYK_R40: M_pyk_R3_c + M_fdp_c -> M_pyk_R4_c; kf_PYK_ACT*(Keq_PYK_ACT*M_fdp_c*M_pyk_R3_c - 4*M_pyk_R4_c)/Keq_PYK_ACT; R_PYK_R40 is "pyk_R3-fdp binding";
  // enzyme_module_id: PYK
  R_PYK_R41: M_pyk_R4_c + M_pep_c -> M_pyk_R4_P_c; kf_PYK_P*(Keq_PYK_P*M_pep_c*M_pyk_R4_c - M_pyk_R4_P_c)/Keq_PYK_P; R_PYK_R41 is "pyk_R4-pep binding";
  // enzyme_module_id: PYK
  R_PYK_R42: M_pyk_R4_c + M_adp_c -> M_pyk_R4_A_c; kf_PYK_A*(Keq_PYK_A*M_adp_c*M_pyk_R4_c - M_pyk_R4_A_c)/Keq_PYK_A; R_PYK_R42 is "pyk_R4-adp binding";
  // enzyme_module_id: PYK
  R_PYK_R43: M_pyk_R4_A_c + M_pep_c -> M_pyk_R4_AP_c; kf_PYK_P*(Keq_PYK_P*M_pep_c*M_pyk_R4_A_c - M_pyk_R4_AP_c)/Keq_PYK_P; R_PYK_R43 is "pyk_R4_A-pep binding";
  // enzyme_module_id: PYK
  R_PYK_R44: M_pyk_R4_P_c + M_adp_c -> M_pyk_R4_AP_c; kf_PYK_A*(Keq_PYK_A*M_adp_c*M_pyk_R4_P_c - M_pyk_R4_AP_c)/Keq_PYK_A; R_PYK_R44 is "pyk_R4_P-adp binding";
  // enzyme_module_id: PYK
  R_PYK_R45: M_pyk_R4_AP_c + M_h_c => M_pyk_R4_c + M_atp_c + M_pyr_c; M_pyk_R4_AP_c*kf_PYK; R_PYK_R45 is "pyk_R4_AP catalyzation";
    Keq_PYK_R45 = INF;
  // enzyme_module_id: PYK
  R_PYK_L: M_pyk_R0_c -> M_pyk_T0_c; kf_PYK_L*(M_pyk_R0_c - M_pyk_T0_c/Keq_PYK_L); R_PYK_L is "pyk_R0-pyk_T0 transition";
    kf_PYK_L = 1000000000000; Keq_PYK_L = 19;
  // enzyme_module_id: PYK
  R_PYK_T1: M_pyk_T0_c + M_atp_c -> M_pyk_T1_c; kf_PYK_I*(4*Keq_PYK_I*M_atp_c*M_pyk_T0_c - M_pyk_T1_c)/Keq_PYK_I; R_PYK_T1 is "pyk_T0-atp binding";
  // enzyme_module_id: PYK
  R_PYK_T2: M_pyk_T1_c + M_atp_c -> M_pyk_T2_c; kf_PYK_I*(3*Keq_PYK_I*M_atp_c*M_pyk_T1_c - 2*M_pyk_T2_c)/Keq_PYK_I; R_PYK_T2 is "pyk_T1-atp binding";
  // enzyme_module_id: PYK
  R_PYK_T3: M_pyk_T2_c + M_atp_c -> M_pyk_T3_c; kf_PYK_I*(2*Keq_PYK_I*M_atp_c*M_pyk_T2_c - 3*M_pyk_T3_c)/Keq_PYK_I; R_PYK_T3 is "pyk_T2-atp binding";
  // enzyme_module_id: PYK
  R_PYK_T4: M_pyk_T3_c + M_atp_c -> M_pyk_T4_c; kf_PYK_I*(Keq_PYK_I*M_atp_c*M_pyk_T3_c - 4*M_pyk_T4_c)/Keq_PYK_I; R_PYK_T4 is "pyk_T3-atp binding";

  // Unit definitions:
  unit mM = 1e-3 mole / litre; mM is "Millimolar";
  unit hr = 3600 second; hr is "hour";
  unit mmol_per_gDW_per_hr = 1e-3 mole / (gram * 3600 second); mmol_per_gDW_per_hr is "cobra flux unit";
end
