// SBML level 3 version 1

model RBC_PFK()

  // Compartments:
  compartment c; c is "Cytosol";
  compartment b; b is "boundary";

  // Species:
  species M_glc__D_c in c = 1.30461; M_glc__D_c is "D-Glucose";
  species M_g6p_c in c = 0.7942129; M_g6p_c is "D-Glucose 6-phosphate";
  species M_f6p_c in c = 0.3255013; M_f6p_c is "D-Fructose 6-phosphate";
  species M_fdp_c in c = 0.01439804; M_fdp_c is "D-Fructose 1,6-bisphosphate";
  species M_dhap_c in c = 0.158788; M_dhap_c is "Dihydroxyacetone phosphate";
  species M_g3p_c in c = 0.007233799; M_g3p_c is "Glyceraldehyde 3-phosphate";
  species M__13dpg_c in c = 0.0002532641; M__13dpg_c is "3-Phospho-D-glyceroyl phosphate";
  species M__3pg_c in c = 0.08852193; M__3pg_c is "3-Phospho-D-glycerate";
  species M__2pg_c in c = 0.01295129; M__2pg_c is "D-Glycerate 2-phosphate";
  species M_pep_c in c = 0.01983062; M_pep_c is "Phosphoenolpyruvate";
  species M_pyr_c in c = 0.06029658; M_pyr_c is "Pyruvate";
  species M_lac__L_c in c = 1.354674; M_lac__L_c is "L-Lactate";
  species M__6pgl_c in c = 0.002381955; M__6pgl_c is "6-Phospho-D-gluco-1,5-lactone";
  species M__6pgc_c in c = 0.6639626; M__6pgc_c is "6-Phospho-D-gluconate";
  species M_ru5p__D_c in c = 0.01502136; M_ru5p__D_c is "D-Ribulose 5-phosphate";
  species M_xu5p__D_c in c = 0.04503972; M_xu5p__D_c is "D-Xylulose 5-phosphate";
  species M_r5p_c in c = 0.03856885; M_r5p_c is "Alpha-D-Ribose 5-phosphate";
  species M_s7p_c in c = 0.2817195; M_s7p_c is "Sedoheptulose 7-phosphate";
  species M_e4p_c in c = 0.006336873; M_e4p_c is "D-Erythrose 4-phosphate";
  species M_ade_c in c = 0.0009996732; M_ade_c is "Adenine";
  species M_adn_c in c = 0.001200096; M_adn_c is "Adenosine";
  species M_imp_c in c = 0.009304688; M_imp_c is "Inosine monophosphate";
  species M_ins_c in c = 0.000999278; M_ins_c is "Inosine";
  species M_hxan_c in c = 0.002000137; M_hxan_c is "Hypoxanthine";
  species M_r1p_c in c = 0.06087135; M_r1p_c is "Alpha-D-Ribose 1-phosphate";
  species M_prpp_c in c = 0.01167385; M_prpp_c is "5-Phospho-alpha-D-ribose 1-diphosphate";
  species M__23dpg_c in c = 3.23094; M__23dpg_c is "2,3-Disphospho-D-glycerate";
  species M_hb_c in c = 0.05960936; M_hb_c is "Hemoglobin";
  species M_hb_1o2_c in c = 0.0500719; M_hb_1o2_c is "Oxyhemoglobin (1)";
  species M_hb_2o2_c in c = 0.07360565; M_hb_2o2_c is "Oxyhemoglobin (2)";
  species M_hb_3o2_c in c = 0.2627715; M_hb_3o2_c is "Oxyhemoglobin (3)";
  species M_hb_4o2_c in c = 6.805793; M_hb_4o2_c is "Oxyhemoglobin (4)";
  species M_dhb_c in c = 0.04814857; M_dhb_c is "Deoxyhemoglobin";
  species M_nad_c in c = 0.05934224; M_nad_c is "Nicotinamide adenine dinucleotide";
  species M_nadh_c in c = 0.02965776; M_nadh_c is "Nicotinamide adenine dinucleotide - reduced";
  species M_amp_c in c = 0.08069779; M_amp_c is "AMP";
  species M_adp_c in c = 0.2449267; M_adp_c is "ADP";
  species M_atp_c in c = 1.226583; M_atp_c is "ATP";
  species M_nadp_c in c = 1.229975e-5; M_nadp_c is "Nicotinamide adenine dinucleotide phosphate";
  species M_nadph_c in c = 0.0659877; M_nadph_c is "Nicotinamide adenine dinucleotide phosphate - reduced";
  species M_gthrd_c in c = 3.201095; M_gthrd_c is "Reduced glutathione";
  species M_gthox_c in c = 0.1194527; M_gthox_c is "Oxidized glutathione";
  species M_pi_c in c = 2.5; M_pi_c is "Phosphate";
  species M_h_c in c = 8.96759e-5; M_h_c is "H+";
  species M_h2o_c in c = 0.999997; M_h2o_c is "H2O";
  species M_co2_c in c = 1.000002; M_co2_c is "CO2";
  species M_nh3_c in c = 0.09100223; M_nh3_c is "Ammonia";
  species M_o2_c in c = 0.0200788; M_o2_c is "Oxygen";
  // bound_catalytic: 1 M_atp_c
  // enzyme_module_id: PFK
  species M_pfk_R0_A_c in c = 4.570498e-9; M_pfk_R0_A_c is "PFK-atp complex";
  // enzyme_module_id: PFK
  species M_pfk_R0_c in c = 1.742899e-9; M_pfk_R0_c is "PFK";
  // bound_catalytic: 1 M_atp_c; 1 M_f6p_c
  // enzyme_module_id: PFK
  species M_pfk_R0_AF_c in c = 4.122665e-10; M_pfk_R0_AF_c is "PFK-atp-f6p complex";
  // bound_effectors: 1 M_amp_c
  // enzyme_module_id: PFK
  species M_pfk_R1_c in c = 1.704825e-8; M_pfk_R1_c is "PFK; 1 amp_c";
  // enzyme_module_id: PFK
  species M_pfk_T0_c in c = 1.917189e-12; M_pfk_T0_c is "PFK";
  // bound_effectors: 1 M_atp_c
  // enzyme_module_id: PFK
  species M_pfk_T1_c in c = 9.406366e-11; M_pfk_T1_c is "PFK; 1 atp_c";
  // bound_catalytic: 1 M_atp_c
  // bound_effectors: 1 M_amp_c
  // enzyme_module_id: PFK
  species M_pfk_R1_A_c in c = 4.470656e-8; M_pfk_R1_A_c is "PFK-atp complex; 1 amp_c";
  // bound_catalytic: 1 M_atp_c; 1 M_f6p_c
  // bound_effectors: 1 M_amp_c
  // enzyme_module_id: PFK
  species M_pfk_R1_AF_c in c = 4.032606e-9; M_pfk_R1_AF_c is "PFK-atp-f6p complex; 1 amp_c";
  // bound_effectors: 2 M_amp_c
  // enzyme_module_id: PFK
  species M_pfk_R2_c in c = 6.253439e-8; M_pfk_R2_c is "PFK; 2 amp_c";
  // bound_effectors: 2 M_atp_c
  // enzyme_module_id: PFK
  species M_pfk_T2_c in c = 1.730654e-9; M_pfk_T2_c is "PFK; 2 atp_c";
  // bound_catalytic: 1 M_atp_c
  // bound_effectors: 2 M_amp_c
  // enzyme_module_id: PFK
  species M_pfk_R2_A_c in c = 1.639873e-7; M_pfk_R2_A_c is "PFK-atp complex; 2 amp_c";
  // bound_catalytic: 1 M_atp_c; 1 M_f6p_c
  // bound_effectors: 2 M_amp_c
  // enzyme_module_id: PFK
  species M_pfk_R2_AF_c in c = 1.479193e-8; M_pfk_R2_AF_c is "PFK-atp-f6p complex; 2 amp_c";
  // bound_effectors: 3 M_amp_c
  // enzyme_module_id: PFK
  species M_pfk_R3_c in c = 1.019472e-7; M_pfk_R3_c is "PFK; 3 amp_c";
  // bound_effectors: 3 M_atp_c
  // enzyme_module_id: PFK
  species M_pfk_T3_c in c = 1.415194e-8; M_pfk_T3_c is "PFK; 3 atp_c";
  // bound_catalytic: 1 M_atp_c
  // bound_effectors: 3 M_amp_c
  // enzyme_module_id: PFK
  species M_pfk_R3_A_c in c = 2.673417e-7; M_pfk_R3_A_c is "PFK-atp complex; 3 amp_c";
  // bound_catalytic: 1 M_atp_c; 1 M_f6p_c
  // bound_effectors: 3 M_amp_c
  // enzyme_module_id: PFK
  species M_pfk_R3_AF_c in c = 2.411466e-8; M_pfk_R3_AF_c is "PFK-atp-f6p complex; 3 amp_c";
  // bound_effectors: 4 M_amp_c
  // enzyme_module_id: PFK
  species M_pfk_R4_c in c = 6.232512e-8; M_pfk_R4_c is "PFK; 4 amp_c";
  // bound_effectors: 4 M_atp_c
  // enzyme_module_id: PFK
  species M_pfk_T4_c in c = 4.339632e-8; M_pfk_T4_c is "PFK; 4 atp_c";
  // bound_catalytic: 1 M_atp_c
  // bound_effectors: 4 M_amp_c
  // enzyme_module_id: PFK
  species M_pfk_R4_A_c in c = 1.634385e-7; M_pfk_R4_A_c is "PFK-atp complex; 4 amp_c";
  // bound_catalytic: 1 M_atp_c; 1 M_f6p_c
  // bound_effectors: 4 M_amp_c
  // enzyme_module_id: PFK
  species M_pfk_R4_AF_c in c = 1.474243e-8; M_pfk_R4_AF_c is "PFK-atp-f6p complex; 4 amp_c";
  species $M_glc__D_b in b = 1;
  species $M_h2o_b in b = 1;
  species $M_h_b in b = 6.30957e-5;
  species $M_lac__L_b in b = 1;
  species $M_pi_b in b = 2.5;
  species $M_pyr_b in b = 0.06;
  species $M_co2_b in b = 1;
  species $M_ade_b in b = 0.001;
  species $M_adn_b in b = 0.0012;
  species $M_hxan_b in b = 0.002;
  species $M_ins_b in b = 0.001;
  species $M_nh3_b in b = 0.091002;
  species $M_o2_b in b = 0.0200788;

  // Parameters:
  cobra_default_lb = -1000 mmol_per_gDW_per_hr;
  cobra_default_ub = 1000 mmol_per_gDW_per_hr;
  cobra_0_bound = 0 mmol_per_gDW_per_hr;
  minus_inf = -INF; minus_inf has mmol_per_gDW_per_hr;
  plus_inf = INF; plus_inf has mmol_per_gDW_per_hr;
  v_HEX1 = 1.12;
  v_PGI = 0.9098498;
  v_FBA = 1.091651;
  v_TPI = 1.091651;
  v_GAPD = 2.274204;
  v_PGK = 1.814576;
  v_PGM = 2.274204;
  v_ENO = 2.274204;
  v_PYK = 2.274204;
  v_LDH_L = 2.053495;
  v_G6PDH2r = 0.2101502;
  v_PGL = 0.2101502;
  v_GND = 0.2101502;
  v_RPE = 0.1818016;
  v_RPI = 0.02834854;
  v_TKT1 = 0.09090082;
  v_TKT2 = 0.09090082;
  v_TALA = 0.09090082;
  v_ADNK1 = 0.09200879;
  v_NTD7 = 0.1116563;
  v_ADA = 0.01000164;
  v_AMPDA = 0.01302656;
  v_NTD11 = 0.01302656;
  v_PUNP5 = 0.09522632;
  v_PPM = 0.09522632;
  v_PRPPS = 0.03267404;
  v_ADPT = 0.03267404;
  v_ADK1 = -0.03267404;
  v_DPGM = 0.4596273;
  v_DPGase = 0.4596273;
  v_HBDPG = -2.884432e-11;
  v_HBO1 = -1.09924e-13;
  v_HBO2 = 1.108222e-13;
  v_HBO3 = -1.104245e-13;
  v_HBO4 = -4.350643e-13;
  v_ATPM = 1.719772;
  v_DM_nadh = 0.2207089;
  v_GTHOr = 0.4203003;
  v_GSHR = 0.4203003;
  v_SK_glc__D_c = 1.12;
  v_SK_pyr_c = 0.2207089;
  v_SK_lac__L_c = 2.053495;
  v_SK_ade_c = -0.03267404;
  v_SK_adn_c = 0.009645838;
  v_SK_ins_c = -0.07219812;
  v_SK_hxan_c = 0.09522632;
  v_SK_pi_c = 0;
  v_SK_h_c = 3.556222;
  v_SK_h2o_c = -0.2957306;
  v_SK_co2_c = 0.2101502;
  v_SK_nh3_c = 0.0230282;
  v_SK_o2_c = 0;
  v_PFK_R01 = 0.007746965;
  v_PFK_R02 = 0.007746965;
  v_PFK_R03 = 0.007746965;
  v_PFK_R10 = 1.091878e-19;
  v_PFK_T1 = 1.124449e-19;
  v_PFK_R11 = 0.07577733;
  v_PFK_R12 = 0.07577733;
  v_PFK_R13 = 0.07577733;
  v_PFK_R20 = 8.735027e-19;
  v_PFK_T2 = 8.271806e-20;
  v_PFK_R21 = 0.2779574;
  v_PFK_R22 = 0.2779574;
  v_PFK_R23 = 0.2779574;
  v_PFK_R30 = 2.096407e-17;
  v_PFK_T3 = 1.323489e-18;
  v_PFK_R31 = 0.4531425;
  v_PFK_R32 = 0.4531425;
  v_PFK_R33 = 0.4531425;
  v_PFK_R40 = -3.494011e-18;
  v_PFK_T4 = 2.646978e-18;
  v_PFK_R41 = 0.2770273;
  v_PFK_R42 = 0.2770273;
  v_PFK_R43 = 0.2770273;
  v_PFK_L = -4.135903e-13;
  Keq_PFK_A = 14.70588;
  Keq_PFK_ACT = 30.30303;
  Keq_PFK_F = 10;
  Keq_PFK_I = 10;
  kf_PFK = 18791158;
  kf_PFK_A = 4240227;
  kf_PFK_ACT = 1000000;
  kf_PFK_F = 5355749;
  kf_PFK_I = 1000000;

  // Reactions:
  R_HEX1: M_atp_c + M_glc__D_c -> M_adp_c + M_g6p_c + M_h_c; kf_HEX1*(M_atp_c*M_glc__D_c - M_adp_c*M_g6p_c/Keq_HEX1); R_HEX1 is "Hexokinase (D-glucose:ATP)";
    kf_HEX1 = 0.7000073; Keq_HEX1 = 850;
  R_PGI: M_g6p_c -> M_f6p_c; kf_PGI*(M_g6p_c - M_f6p_c/Keq_PGI); R_PGI is "Glucose-6-phosphate isomerase";
    kf_PGI = 2961.111; Keq_PGI = 0.41;
  R_FBA: M_fdp_c -> M_dhap_c + M_g3p_c; kf_FBA*(M_fdp_c - M_dhap_c*M_g3p_c/Keq_FBA); R_FBA is "Fructose-bisphosphate aldolase";
    kf_FBA = 2797.449; Keq_FBA = 0.082;
  R_TPI: M_dhap_c -> M_g3p_c; kf_TPI*(M_dhap_c - M_g3p_c/Keq_TPI); R_TPI is "Triose-phosphate isomerase";
    kf_TPI = 33.90583; Keq_TPI = 0.0571429;
  R_GAPD: M_g3p_c + M_nad_c + M_pi_c -> M__13dpg_c + M_h_c + M_nadh_c; kf_GAPD*(M_g3p_c*M_nad_c*M_pi_c - M__13dpg_c*M_nadh_c/Keq_GAPD); R_GAPD is "Glyceraldehyde-3-phosphate dehydrogenase";
    kf_GAPD = 3479.76; Keq_GAPD = 0.0179;
  R_PGK: M__13dpg_c + M_adp_c -> M__3pg_c + M_atp_c; kf_PGK*(M__13dpg_c*M_adp_c - M__3pg_c*M_atp_c/Keq_PGK); R_PGK is "Phosphoglycerate kinase";
    kf_PGK = 1061655; Keq_PGK = 1800;
  R_PGM: M__3pg_c -> M__2pg_c; kf_PGM*(M__3pg_c - M__2pg_c/Keq_PGM); R_PGM is "Phosphoglycerate mutase";
    kf_PGM = 5017.11; Keq_PGM = 0.147059;
  R_ENO: M__2pg_c -> M_h2o_c + M_pep_c; kf_ENO*(M__2pg_c - M_pep_c/Keq_ENO); R_ENO is "Enolase";
    kf_ENO = 1817.545; Keq_ENO = 1.69492;
  R_PYK: M_adp_c + M_h_c + M_pep_c -> M_atp_c + M_pyr_c; kf_PYK*(M_adp_c*M_pep_c - M_atp_c*M_pyr_c/Keq_PYK); R_PYK is "Pyruvate kinase";
    kf_PYK = 468.247; Keq_PYK = 363000;
  R_LDH_L: M_h_c + M_nadh_c + M_pyr_c -> M_lac__L_c + M_nad_c; kf_LDH_L*(M_nadh_c*M_pyr_c - M_lac__L_c*M_nad_c/Keq_LDH_L); R_LDH_L is "L-lactate dehydrogenase";
    kf_LDH_L = 1150.285; Keq_LDH_L = 26300;
  R_G6PDH2r: M_nadp_c + M_g6p_c -> M__6pgl_c + M_nadph_c + M_h_c; kf_G6PDH2r*(M_g6p_c*M_nadp_c - M__6pgl_c*M_nadph_c/Keq_G6PDH2r); R_G6PDH2r is "Glucose 6-phosphate dehydrogenase";
    kf_G6PDH2r = 21864.59; Keq_G6PDH2r = 1000;
  R_PGL: M__6pgl_c + M_h2o_c -> M__6pgc_c + M_h_c; kf_PGL*(M__6pgl_c - M__6pgc_c/Keq_PGL); R_PGL is "6-phosphogluconolactonase";
    kf_PGL = 122.3231; Keq_PGL = 1000;
  R_GND: M__6pgc_c + M_nadp_c -> M_co2_c + M_ru5p__D_c + M_nadph_c; kf_GND*(M__6pgc_c*M_nadp_c - M_co2_c*M_nadph_c*M_ru5p__D_c/Keq_GND); R_GND is "Phosphogluconate dehydrogenase";
    kf_GND = 29287.81; Keq_GND = 1000;
  R_RPE: M_ru5p__D_c -> M_xu5p__D_c; kf_RPE*(M_ru5p__D_c - M_xu5p__D_c/Keq_RPE); R_RPE is "Ribulose 5-phosphate 3-epimerase";
    kf_RPE = 22392.05; Keq_RPE = 3;
  R_RPI: M_ru5p__D_c -> M_r5p_c; kf_RPI*(M_ru5p__D_c - M_r5p_c/Keq_RPI); R_RPI is "Ribulose 5-Phosphate Isomerase";
    kf_RPI = 2021.058; Keq_RPI = 2.57;
  R_TKT1: M_r5p_c + M_xu5p__D_c -> M_s7p_c + M_g3p_c; kf_TKT1*(M_r5p_c*M_xu5p__D_c - M_g3p_c*M_s7p_c/Keq_TKT1); R_TKT1 is "Transketolase";
    kf_TKT1 = 2338.07; Keq_TKT1 = 1.2;
  R_TKT2: M_e4p_c + M_xu5p__D_c -> M_f6p_c + M_g3p_c; kf_TKT2*(M_e4p_c*M_xu5p__D_c - M_f6p_c*M_g3p_c/Keq_TKT2); R_TKT2 is "Transketolase";
    kf_TKT2 = 1600.141; Keq_TKT2 = 10.3;
  R_TALA: M_g3p_c + M_s7p_c -> M_e4p_c + M_f6p_c; kf_TALA*(M_g3p_c*M_s7p_c - M_e4p_c*M_f6p_c/Keq_TALA); R_TALA is "Transaldolase";
    kf_TALA = 1237.362; Keq_TALA = 1.05;
  R_ADNK1: M_adn_c + M_atp_c => M_adp_c + M_amp_c + M_h_c; kf_ADNK1*(M_adn_c*M_atp_c - M_adp_c*M_amp_c/Keq_ADNK1); R_ADNK1 is "Adenosine kinase";
    kf_ADNK1 = 62.5052; Keq_ADNK1 = INF;
  R_NTD7: M_amp_c + M_h2o_c => M_adn_c + M_pi_c; kf_NTD7*(M_amp_c - M_adn_c*M_pi_c/Keq_NTD7); R_NTD7 is "5'-nucleotidase (AMP)";
    kf_NTD7 = 1.383635; Keq_NTD7 = INF;
  R_ADA: M_adn_c + M_h2o_c => M_ins_c + M_nh3_c; kf_ADA*(M_adn_c - M_ins_c*M_nh3_c/Keq_ADA); R_ADA is "Adenosine deaminase";
    kf_ADA = 8.334027; Keq_ADA = INF;
  R_AMPDA: M_amp_c + M_h2o_c => M_imp_c + M_nh3_c; kf_AMPDA*(M_amp_c - M_imp_c*M_nh3_c/Keq_AMPDA); R_AMPDA is "Adenosine monophosphate deaminase";
    kf_AMPDA = 0.161424; Keq_AMPDA = INF;
  R_NTD11: M_h2o_c + M_imp_c => M_ins_c + M_pi_c; kf_NTD11*(M_imp_c - M_ins_c*M_pi_c/Keq_NTD11); R_NTD11 is "5'-nucleotidase (IMP)";
    kf_NTD11 = 1.4; Keq_NTD11 = INF;
  R_PUNP5: M_ins_c + M_pi_c -> M_hxan_c + M_r1p_c; kf_PUNP5*(M_ins_c*M_pi_c - M_hxan_c*M_r1p_c/Keq_PUNP5); R_PUNP5 is "Purine-nucleoside phosphorylase (Inosine)";
    kf_PUNP5 = 83.13764; Keq_PUNP5 = 0.09;
  R_PPM: M_r1p_c -> M_r5p_c; kf_PPM*(M_r1p_c - M_r5p_c/Keq_PPM); R_PPM is "Phosphopentomutase";
    kf_PPM = 1.642642; Keq_PPM = 13.3;
  R_PRPPS: M_atp_c + M_r5p_c => M_prpp_c + M_h_c + M_amp_c; kf_PRPPS*(M_atp_c*M_r5p_c - M_amp_c*M_prpp_c/Keq_PRPPS); R_PRPPS is "Phosphoribosylpyrophosphate synthetase";
    kf_PRPPS = 0.6906677; Keq_PRPPS = INF;
  R_ADPT: M_ade_c + M_h2o_c + M_prpp_c => M_amp_c + M_h_c + 2 M_pi_c; kf_ADPT*(M_ade_c*M_prpp_c - M_amp_c*M_pi_c^2/Keq_ADPT);
    kf_ADPT = 2799.824; Keq_ADPT = INF;
  R_ADK1: 2 M_adp_c -> M_amp_c + M_atp_c; kf_ADK1*(M_adp_c^2 - M_amp_c*M_atp_c/Keq_ADK1); R_ADK1 is "Adenylate kinase";
    kf_ADK1 = 100000; Keq_ADK1 = 1.65;
  R_DPGM: M__13dpg_c -> M__23dpg_c + M_h_c; kf_DPGM*(M__13dpg_c - M__23dpg_c/Keq_DPGM); R_DPGM is "Diphosphoglyceromutase";
    kf_DPGM = 1824.937; Keq_DPGM = 2300000;
  R_DPGase: M__23dpg_c + M_h2o_c => M__3pg_c + M_pi_c; kf_DPGase*(M__23dpg_c - M__3pg_c*M_pi_c/Keq_DPGase); R_DPGase is "Diphosphoglycerate phosphatase";
    kf_DPGase = 0.1422581; Keq_DPGase = INF;
  R_HBDPG: M__23dpg_c + M_hb_c -> M_dhb_c; kf_HBDPG*(M__23dpg_c*M_hb_c - M_dhb_c/Keq_HBDPG); R_HBDPG is "Hemoglobin-23dpg binding";
    kf_HBDPG = 519613; Keq_HBDPG = 0.25;
  R_HBO1: M_hb_c + M_o2_c -> M_hb_1o2_c; kf_HBO1*(M_hb_c*M_o2_c - M_hb_1o2_c/Keq_HBO1); R_HBO1 is "Oxygen Loading (1)";
    kf_HBO1 = 506935; Keq_HBO1 = 41.8352;
  R_HBO2: M_hb_1o2_c + M_o2_c -> M_hb_2o2_c; kf_HBO2*(M_hb_1o2_c*M_o2_c - M_hb_2o2_c/Keq_HBO2); R_HBO2 is "Oxygen Loading (2)";
    kf_HBO2 = 511077; Keq_HBO2 = 73.2115;
  R_HBO3: M_hb_2o2_c + M_o2_c -> M_hb_3o2_c; kf_HBO3*(M_hb_2o2_c*M_o2_c - M_hb_3o2_c/Keq_HBO3); R_HBO3 is "Oxygen Loading (3)";
    kf_HBO3 = 509243; Keq_HBO3 = 177.799;
  R_HBO4: M_hb_3o2_c + M_o2_c -> M_hb_4o2_c; kf_HBO4*(M_hb_3o2_c*M_o2_c - M_hb_4o2_c/Keq_HBO4); R_HBO4 is "Oxygen Loading (4)";
    kf_HBO4 = 501595; Keq_HBO4 = 1289.92;
  R_ATPM: M_atp_c + M_h2o_c => M_adp_c + M_h_c + M_pi_c; kf_ATPM*(M_atp_c - M_adp_c*M_pi_c/Keq_ATPM); R_ATPM is "ATP maintenance requirement";
    kf_ATPM = 1.402083; Keq_ATPM = INF;
  R_DM_nadh: M_nadh_c => M_h_c + M_nad_c; kf_DM_nadh*(M_nadh_c - M_nad_c/Keq_DM_nadh); R_DM_nadh is "Demand NADH";
    kf_DM_nadh = 7.44186; Keq_DM_nadh = INF;
  R_GTHOr: M_gthox_c + M_h_c + M_nadph_c -> 2 M_gthrd_c + M_nadp_c; kf_GTHOr*(M_gthox_c*M_nadph_c - M_gthrd_c^2*M_nadp_c/Keq_GTHOr); R_GTHOr is "Glutathione oxidoreductase";
    kf_GTHOr = 53.32981; Keq_GTHOr = 100;
  R_GSHR: 2 M_gthrd_c -> M_gthox_c + 2 M_h_c; kf_GSHR*(M_gthrd_c^2 - M_gthox_c/Keq_GSHR); R_GSHR is "Glutathione-disulfide reductase";
    kf_GSHR = 0.04125737; Keq_GSHR = 2;
  R_SK_glc__D_c: $M_glc__D_b -> M_glc__D_c; kf_SK_glc__D_c*(M_glc__D_b - M_glc__D_c/Keq_SK_glc__D_c); R_SK_glc__D_c is "D-Glucose_sink";
    kf_SK_glc__D_c = 1.12; Keq_SK_glc__D_c = INF;
  R_SK_pyr_c: M_pyr_c -> $M_pyr_b; kf_SK_pyr_c*(M_pyr_c - M_pyr_b/Keq_SK_pyr_c); R_SK_pyr_c is "Pyruvate_sink";
    kf_SK_pyr_c = 744.186; Keq_SK_pyr_c = 1;
  R_SK_lac__L_c: M_lac__L_c -> $M_lac__L_b; kf_SK_lac__L_c*(M_lac__L_c - M_lac__L_b/Keq_SK_lac__L_c); R_SK_lac__L_c is "L-Lactate_sink";
    kf_SK_lac__L_c = 5.789815; Keq_SK_lac__L_c = 1;
  R_SK_ade_c: M_ade_c -> $M_ade_b; kf_SK_ade_c*(M_ade_c - M_ade_b/Keq_SK_ade_c); R_SK_ade_c is "Adenine_sink";
    kf_SK_ade_c = 99993.73; Keq_SK_ade_c = 1;
  R_SK_adn_c: M_adn_c -> $M_adn_b; kf_SK_adn_c*(M_adn_c - M_adn_b/Keq_SK_adn_c); R_SK_adn_c is "Adenosine_sink";
    kf_SK_adn_c = 100097.8; Keq_SK_adn_c = 1;
  R_SK_ins_c: M_ins_c -> $M_ins_b; kf_SK_ins_c*(M_ins_c - M_ins_b/Keq_SK_ins_c); R_SK_ins_c is "Inosine_sink";
    kf_SK_ins_c = 100000; Keq_SK_ins_c = 1;
  R_SK_hxan_c: M_hxan_c -> $M_hxan_b; kf_SK_hxan_c*(M_hxan_c - M_hxan_b/Keq_SK_hxan_c); R_SK_hxan_c is "Hypoxanthine_sink";
    kf_SK_hxan_c = 692813.7; Keq_SK_hxan_c = 1;
  R_SK_pi_c: M_pi_c -> $M_pi_b; kf_SK_pi_c*(M_pi_c - M_pi_b/Keq_SK_pi_c); R_SK_pi_c is "Phosphate_sink";
    kf_SK_pi_c = 100000; Keq_SK_pi_c = 1;
  R_SK_h_c: M_h_c -> $M_h_b; kf_SK_h_c*(M_h_c - M_h_b/Keq_SK_h_c); R_SK_h_c is "H+_sink";
    kf_SK_h_c = 133792.2; Keq_SK_h_c = 1;
  R_SK_h2o_c: M_h2o_c -> $M_h2o_b; kf_SK_h2o_c*(M_h2o_c - M_h2o_b/Keq_SK_h2o_c); R_SK_h2o_c is "H2O_sink";
    kf_SK_h2o_c = 100000; Keq_SK_h2o_c = 1;
  R_SK_co2_c: M_co2_c -> $M_co2_b; kf_SK_co2_c*(M_co2_c - M_co2_b/Keq_SK_co2_c); R_SK_co2_c is "CO2_sink";
    kf_SK_co2_c = 100000; Keq_SK_co2_c = 1;
  R_SK_nh3_c: M_nh3_c -> $M_nh3_b; kf_SK_nh3_c*(M_nh3_c - M_nh3_b/Keq_SK_nh3_c); R_SK_nh3_c is "Ammonia_sink";
    kf_SK_nh3_c = 100003.5; Keq_SK_nh3_c = 1;
  R_SK_o2_c: M_o2_c -> $M_o2_b; kf_SK_o2_c*(M_o2_c - M_o2_b/Keq_SK_o2_c); R_SK_o2_c is "Oxygen_sink";
    kf_SK_o2_c = 509726; Keq_SK_o2_c = 1;
  // enzyme_module_id: PFK
  R_PFK_R01: M_pfk_R0_c + M_atp_c -> M_pfk_R0_A_c; kf_PFK_A*(Keq_PFK_A*M_atp_c*M_pfk_R0_c - M_pfk_R0_A_c)/Keq_PFK_A; R_PFK_R01 is "pfk_R0-atp binding";
  // enzyme_module_id: PFK
  R_PFK_R02: M_f6p_c + M_pfk_R0_A_c -> M_pfk_R0_AF_c; kf_PFK_F*(Keq_PFK_F*M_f6p_c*M_pfk_R0_A_c - M_pfk_R0_AF_c)/Keq_PFK_F; R_PFK_R02 is "pfk_R0_A-f6p binding";
  // enzyme_module_id: PFK
  R_PFK_R03: M_pfk_R0_AF_c => M_adp_c + M_fdp_c + M_h_c + M_pfk_R0_c; M_pfk_R0_AF_c*kf_PFK; R_PFK_R03 is "pfk_R0_AF catalyzation";
    Keq_PFK_R03 = INF;
  // enzyme_module_id: PFK
  R_PFK_R10: M_amp_c + M_pfk_R0_c -> M_pfk_R1_c; kf_PFK_ACT*(4*Keq_PFK_ACT*M_amp_c*M_pfk_R0_c - M_pfk_R1_c)/Keq_PFK_ACT; R_PFK_R10 is "pfk_R0-amp binding";
  // enzyme_module_id: PFK
  R_PFK_T1: M_pfk_T0_c + M_atp_c -> M_pfk_T1_c; kf_PFK_I*(4*Keq_PFK_I*M_atp_c*M_pfk_T0_c - M_pfk_T1_c)/Keq_PFK_I; R_PFK_T1 is "pfk_T0-atp binding";
  // enzyme_module_id: PFK
  R_PFK_R11: M_atp_c + M_pfk_R1_c -> M_pfk_R1_A_c; kf_PFK_A*(Keq_PFK_A*M_atp_c*M_pfk_R1_c - M_pfk_R1_A_c)/Keq_PFK_A; R_PFK_R11 is "pfk_R1-atp binding";
  // enzyme_module_id: PFK
  R_PFK_R12: M_f6p_c + M_pfk_R1_A_c -> M_pfk_R1_AF_c; kf_PFK_F*(Keq_PFK_F*M_f6p_c*M_pfk_R1_A_c - M_pfk_R1_AF_c)/Keq_PFK_F; R_PFK_R12 is "pfk_R1_A-f6p binding";
  // enzyme_module_id: PFK
  R_PFK_R13: M_pfk_R1_AF_c => M_adp_c + M_fdp_c + M_h_c + M_pfk_R1_c; M_pfk_R1_AF_c*kf_PFK; R_PFK_R13 is "pfk_R1_AF catalyzation";
    Keq_PFK_R13 = INF;
  // enzyme_module_id: PFK
  R_PFK_R20: M_amp_c + M_pfk_R1_c -> M_pfk_R2_c; kf_PFK_ACT*(3*Keq_PFK_ACT*M_amp_c*M_pfk_R1_c - 2*M_pfk_R2_c)/Keq_PFK_ACT; R_PFK_R20 is "pfk_R1-amp binding";
  // enzyme_module_id: PFK
  R_PFK_T2: M_atp_c + M_pfk_T1_c -> M_pfk_T2_c; kf_PFK_I*(3*Keq_PFK_I*M_atp_c*M_pfk_T1_c - 2*M_pfk_T2_c)/Keq_PFK_I; R_PFK_T2 is "pfk_T1-atp binding";
  // enzyme_module_id: PFK
  R_PFK_R21: M_atp_c + M_pfk_R2_c -> M_pfk_R2_A_c; kf_PFK_A*(Keq_PFK_A*M_atp_c*M_pfk_R2_c - M_pfk_R2_A_c)/Keq_PFK_A; R_PFK_R21 is "pfk_R2-atp binding";
  // enzyme_module_id: PFK
  R_PFK_R22: M_f6p_c + M_pfk_R2_A_c -> M_pfk_R2_AF_c; kf_PFK_F*(Keq_PFK_F*M_f6p_c*M_pfk_R2_A_c - M_pfk_R2_AF_c)/Keq_PFK_F; R_PFK_R22 is "pfk_R2_A-f6p binding";
  // enzyme_module_id: PFK
  R_PFK_R23: M_pfk_R2_AF_c => M_adp_c + M_fdp_c + M_h_c + M_pfk_R2_c; M_pfk_R2_AF_c*kf_PFK; R_PFK_R23 is "pfk_R2_AF catalyzation";
    Keq_PFK_R23 = INF;
  // enzyme_module_id: PFK
  R_PFK_R30: M_amp_c + M_pfk_R2_c -> M_pfk_R3_c; kf_PFK_ACT*(2*Keq_PFK_ACT*M_amp_c*M_pfk_R2_c - 3*M_pfk_R3_c)/Keq_PFK_ACT; R_PFK_R30 is "pfk_R2-amp binding";
  // enzyme_module_id: PFK
  R_PFK_T3: M_atp_c + M_pfk_T2_c -> M_pfk_T3_c; kf_PFK_I*(2*Keq_PFK_I*M_atp_c*M_pfk_T2_c - 3*M_pfk_T3_c)/Keq_PFK_I; R_PFK_T3 is "pfk_T2-atp binding";
  // enzyme_module_id: PFK
  R_PFK_R31: M_atp_c + M_pfk_R3_c -> M_pfk_R3_A_c; kf_PFK_A*(Keq_PFK_A*M_atp_c*M_pfk_R3_c - M_pfk_R3_A_c)/Keq_PFK_A; R_PFK_R31 is "pfk_R3-atp binding";
  // enzyme_module_id: PFK
  R_PFK_R32: M_f6p_c + M_pfk_R3_A_c -> M_pfk_R3_AF_c; kf_PFK_F*(Keq_PFK_F*M_f6p_c*M_pfk_R3_A_c - M_pfk_R3_AF_c)/Keq_PFK_F; R_PFK_R32 is "pfk_R3_A-f6p binding";
  // enzyme_module_id: PFK
  R_PFK_R33: M_pfk_R3_AF_c => M_adp_c + M_fdp_c + M_h_c + M_pfk_R3_c; M_pfk_R3_AF_c*kf_PFK; R_PFK_R33 is "pfk_R3_AF catalyzation";
    Keq_PFK_R33 = INF;
  // enzyme_module_id: PFK
  R_PFK_R40: M_amp_c + M_pfk_R3_c -> M_pfk_R4_c; kf_PFK_ACT*(Keq_PFK_ACT*M_amp_c*M_pfk_R3_c - 4*M_pfk_R4_c)/Keq_PFK_ACT; R_PFK_R40 is "pfk_R3-amp binding";
  // enzyme_module_id: PFK
  R_PFK_T4: M_atp_c + M_pfk_T3_c -> M_pfk_T4_c; kf_PFK_I*(Keq_PFK_I*M_atp_c*M_pfk_T3_c - 4*M_pfk_T4_c)/Keq_PFK_I; R_PFK_T4 is "pfk_T3-atp binding";
  // enzyme_module_id: PFK
  R_PFK_R41: M_atp_c + M_pfk_R4_c -> M_pfk_R4_A_c; kf_PFK_A*(Keq_PFK_A*M_atp_c*M_pfk_R4_c - M_pfk_R4_A_c)/Keq_PFK_A; R_PFK_R41 is "pfk_R4-atp binding";
  // enzyme_module_id: PFK
  R_PFK_R42: M_f6p_c + M_pfk_R4_A_c -> M_pfk_R4_AF_c; kf_PFK_F*(Keq_PFK_F*M_f6p_c*M_pfk_R4_A_c - M_pfk_R4_AF_c)/Keq_PFK_F; R_PFK_R42 is "pfk_R4_A-f6p binding";
  // enzyme_module_id: PFK
  R_PFK_R43: M_pfk_R4_AF_c => M_adp_c + M_fdp_c + M_h_c + M_pfk_R4_c; M_pfk_R4_AF_c*kf_PFK; R_PFK_R43 is "pfk_R4_AF catalyzation";
    Keq_PFK_R43 = INF;
  // enzyme_module_id: PFK
  R_PFK_L: M_pfk_R0_c -> M_pfk_T0_c; kf_PFK_L*(M_pfk_R0_c - M_pfk_T0_c/Keq_PFK_L); R_PFK_L is "pfk_R0-pfk_T0 transition";
    kf_PFK_L = 1000000000000; Keq_PFK_L = 0.0011;

  // Unit definitions:
  unit mM = 1e-3 mole / litre; mM is "Millimolar";
  unit hr = 3600 second; hr is "hour";
  unit mmol_per_gDW_per_hr = 1e-3 mole / (3600 second * gram); mmol_per_gDW_per_hr is "cobra flux unit";
end
