// SBML level 3 version 2

model PentosePhosphatePathway()

  // Compartments:
  compartment c; c is "Cytosol";
  compartment b; b is "boundary";

  // Species:
  species M_f6p_c in c = 0.0198; M_f6p_c is "D-Fructose 6-phosphate";
  species M_g6p_c in c = 0.0486; M_g6p_c is "D-Glucose 6-phosphate";
  species M_g3p_c in c = 0.00728; M_g3p_c is "Glyceraldehyde 3-phosphate";
  species M__6pgl_c in c = 0.00175424; M__6pgl_c is "6-Phospho-D-gluco-1,5-lactone";
  species M__6pgc_c in c = 0.0374753; M__6pgc_c is "6-Phospho-D-gluconate";
  species M_ru5p__D_c in c = 0.00493679; M_ru5p__D_c is "D-Ribulose 5-phosphate";
  species M_xu5p__D_c in c = 0.0147842; M_xu5p__D_c is "D-Xylulose 5-phosphate";
  species M_r5p_c in c = 0.0126689; M_r5p_c is "Alpha-D-Ribose 5-phosphate";
  species M_s7p_c in c = 0.023988; M_s7p_c is "Sedoheptulose 7-phosphate";
  species M_e4p_c in c = 0.00507507; M_e4p_c is "D-Erythrose 4-phosphate";
  species M_nadp_c in c = 0.0002; M_nadp_c is "Nicotinamide adenine dinucleotide phosphate";
  species M_nadph_c in c = 0.0658; M_nadph_c is "Nicotinamide adenine dinucleotide phosphate - reduced";
  species M_gthrd_c in c = 3.2; M_gthrd_c is "Reduced glutathione";
  species M_gthox_c in c = 0.12; M_gthox_c is "Oxidized glutathione";
  species M_co2_c in c = 1; M_co2_c is "CO2";
  species M_h_c in c = 7.14957e-5; M_h_c is "H+";
  species M_h2o_c in c = 1; M_h2o_c is "H2O";
  species $M_f6p_b in b = 1;
  species $M_r5p_b in b = 1;
  species $M_g3p_b in b = 1;
  species $M_g6p_b in b = 1;
  species $M_h_b in b = 6.30957e-5;
  species $M_h2o_b in b = 1;
  species $M_co2_b in b = 1;

  // Parameters:
  kf_R_G6PDH2r = 21864.59;
  kf_R_PGL = 122.3231;
  kf_R_GND = 29287.81;
  kf_R_RPE = 15284.68;
  kf_R_RPI = 10564.62;
  kf_R_TKT1 = 1595.952;
  kf_R_TKT2 = 1092.246;
  kf_R_TALA = 844.6161;
  kf_R_GTHOr = 53.32981;
  kf_R_GSHR = 0.04125737;
  kf_R_SK_g6p_c = 0.2207273;
  kf_R_DM_f6p_c = 6.734007;
  kf_R_DM_g3p_c = 9.157509;
  kf_R_DM_r5p_c = 0.7893345;
  kf_R_SK_co2_c = 100000;
  kf_R_SK_h_c = 100000;
  kf_R_SK_h2o_c = 100000;
  Keq_R_G6PDH2r = 1000;
  Keq_R_PGL = 1000;
  Keq_R_GND = 1000;
  Keq_R_RPE = 3;
  Keq_R_RPI = 2.57;
  Keq_R_TKT1 = 1.2;
  Keq_R_TKT2 = 10.3;
  Keq_R_TALA = 1.05;
  Keq_R_GTHOr = 100;
  Keq_R_GSHR = 2;
  Keq_R_SK_g6p_c = 1;
  Keq_R_DM_f6p_c = INF;
  Keq_R_DM_g3p_c = INF;
  Keq_R_DM_r5p_c = INF;
  Keq_R_SK_co2_c = 1;
  Keq_R_SK_h_c = 1;
  Keq_R_SK_h2o_c = 1;
  v_R_G6PDH2r = 0.21;
  v_R_PGL = 0.21;
  v_R_GND = 0.21;
  v_R_RPE = 0.13333333;
  v_R_RPI = 0.07666667;
  v_R_TKT1 = 0.06666667;
  v_R_TKT2 = 0.06666667;
  v_R_TALA = 0.06666667;
  v_R_GTHOr = 0.42;
  v_R_GSHR = 0.42;
  v_R_SK_g6p_c = 0.21;
  v_R_DM_f6p_c = 0.13333333;
  v_R_DM_g3p_c = 0.06666667;
  v_R_DM_r5p_c = 0.01;
  v_R_SK_co2_c = 0.21;
  v_R_SK_h_c = 0.84;
  v_R_SK_h2o_c = -0.21;

  // Reactions:
  R_G6PDH2r: M_g6p_c + M_nadp_c -> M__6pgl_c + M_nadph_c + M_h_c; kf_R_G6PDH2r*(M_g6p_c*M_nadp_c - M__6pgl_c*M_nadph_c/Keq_R_G6PDH2r); R_G6PDH2r is "Glucose 6-phosphate dehydrogenase";
  R_PGL: M_h2o_c + M__6pgl_c -> M__6pgc_c + M_h_c; kf_R_PGL*(M__6pgl_c - M__6pgc_c/Keq_R_PGL); R_PGL is "6-phosphogluconolactonase";
  R_GND: M__6pgc_c + M_nadp_c -> M_co2_c + M_ru5p__D_c + M_nadph_c; kf_R_GND*(M__6pgc_c*M_nadp_c - M_co2_c*M_nadph_c*M_ru5p__D_c/Keq_R_GND); R_GND is "Phosphogluconate dehydrogenase";
  R_RPE: M_ru5p__D_c -> M_xu5p__D_c; kf_R_RPE*(M_ru5p__D_c - M_xu5p__D_c/Keq_R_RPE); R_RPE is "Ribulose 5-phosphate 3-epimerase";
  R_RPI: M_ru5p__D_c -> M_r5p_c; kf_R_RPI*(M_ru5p__D_c - M_r5p_c/Keq_R_RPI); R_RPI is "Ribulose 5-Phosphate Isomerase";
  R_TKT1: M_r5p_c + M_xu5p__D_c -> M_g3p_c + M_s7p_c; kf_R_TKT1*(M_r5p_c*M_xu5p__D_c - M_g3p_c*M_s7p_c/Keq_R_TKT1); R_TKT1 is "Transketolase";
  R_TKT2: M_e4p_c + M_xu5p__D_c -> M_f6p_c + M_g3p_c; kf_R_TKT2*(M_e4p_c*M_xu5p__D_c - M_f6p_c*M_g3p_c/Keq_R_TKT2); R_TKT2 is "Transketolase";
  R_TALA: M_g3p_c + M_s7p_c -> M_e4p_c + M_f6p_c; kf_R_TALA*(M_g3p_c*M_s7p_c - M_e4p_c*M_f6p_c/Keq_R_TALA); R_TALA is "Transaldolase";
  R_GTHOr: M_gthox_c + M_h_c + M_nadph_c -> 2 M_gthrd_c + M_nadp_c; kf_R_GTHOr*(M_gthox_c*M_nadph_c - M_gthrd_c^2*M_nadp_c/Keq_R_GTHOr); R_GTHOr is "Glutathione oxidoreductase";
  R_GSHR: 2 M_gthrd_c -> M_gthox_c + 2 M_h_c; kf_R_GSHR*(M_gthrd_c^2 - M_gthox_c/Keq_R_GSHR); R_GSHR is "Glutathione-disulfide reductase";
  R_SK_g6p_c: $M_g6p_b -> M_g6p_c; kf_R_SK_g6p_c*(M_g6p_b - M_g6p_c/Keq_R_SK_g6p_c); R_SK_g6p_c is "D-Glucose 6-phosphate_sink";
  R_DM_f6p_c: M_f6p_c => $M_f6p_b; M_f6p_c*kf_R_DM_f6p_c; R_DM_f6p_c is "D-Fructose 6-phosphate_demand";
  R_DM_g3p_c: M_g3p_c => $M_g3p_b; M_g3p_c*kf_R_DM_g3p_c; R_DM_g3p_c is "Glyceraldehyde 3-phosphate_demand";
  R_DM_r5p_c: M_r5p_c => $M_r5p_b; M_r5p_c*kf_R_DM_r5p_c; R_DM_r5p_c is "Alpha-D-Ribose 5-phosphate_demand";
  R_SK_co2_c: M_co2_c -> $M_co2_b; kf_R_SK_co2_c*(M_co2_c - M_co2_b/Keq_R_SK_co2_c); R_SK_co2_c is "CO2_sink";
  R_SK_h_c: M_h_c -> $M_h_b; kf_R_SK_h_c*(M_h_c - M_h_b/Keq_R_SK_h_c); R_SK_h_c is "H+_sink";
  R_SK_h2o_c: M_h2o_c -> $M_h2o_b; kf_R_SK_h2o_c*(M_h2o_c - M_h2o_b/Keq_R_SK_h2o_c); R_SK_h2o_c is "H2O_sink";
end
