// SBML level 3 version 2

model HEX1()
  // Hexokinase (D-glucose:ATP)

  // Compartments:
  compartment c; c is "Cytosol";

  // Species:
  species M_glc__D_c in c = 1; M_glc__D_c is "D-Glucose";
  species M_g6p_c in c = 0.0486; M_g6p_c is "D-Glucose 6-phosphate";
  species M__23dpg_c in c = 3.1; M__23dpg_c is "2,3-Disphospho-D-glycerate";
  species M_atp_c in c = 1.6; M_atp_c is "ATP";
  species M_adp_c in c = 0.29; M_adp_c is "ADP";
  species M_h_c in c = 8.99757e-5; M_h_c is "H+";
  species M_hex1_c in c = 4.351719e-6; M_hex1_c is "HEX1";
  species M_hex1_A_c in c = 2.730695e-6; M_hex1_A_c is "HEX1-atp complex";
  species M_hex1_G_c in c = 7.13042e-6; M_hex1_G_c is "HEX1-glc__D complex";
  species M_hex1_AG_c in c = 4.503034e-6; M_hex1_AG_c is "HEX1-glc__D-atp complex";
  species M_hex1_G_CI_c in c = 4.018964e-6; M_hex1_G_CI_c is "HEX1-glc__D-_23dpg complex";
  species M_hex1_A_PI_c in c = 1.261999e-6; M_hex1_A_PI_c is "HEX1-adp complex";
  species M_hex1_G_PI_c in c = 3.172e-9; M_hex1_G_PI_c is "HEX1-g6p complex";

  // Parameters:
  kf_R_HEX1_1 = 1000000;
  kf_R_HEX1_2 = 1000000;
  kf_R_HEX1_5 = 1000000;
  Keq_R_HEX1_1 = 1;
  Keq_R_HEX1_2 = 0.015;
  Keq_R_HEX1_5 = 0.1818182;
  Keq_HEX1_A = 0.4854369;
  Keq_HEX1_G = 26.31579;
  Keq_HEX1 = 313.12;
  kf_HEX1 = 248732;
  kf_HEX1_A = 322772;
  kf_HEX1_G = 168666;

  // Reactions:
  R_HEX1_1: M_hex1_c + M_adp_c -> M_hex1_A_PI_c; kf_R_HEX1_1*(M_adp_c*M_hex1_c - M_hex1_A_PI_c/Keq_R_HEX1_1); R_HEX1_1 is "hex1-adp binding";
  R_HEX1_2: M_hex1_c + M_g6p_c -> M_hex1_G_PI_c; kf_R_HEX1_2*(M_g6p_c*M_hex1_c - M_hex1_G_PI_c/Keq_R_HEX1_2); R_HEX1_2 is "hex1-g6p binding";
  R_HEX1_3: M_hex1_c + M_glc__D_c -> M_hex1_G_c; kf_HEX1_G*(M_glc__D_c*M_hex1_c - M_hex1_G_c/Keq_HEX1_G); R_HEX1_3 is "hex1-glc__D binding";
  R_HEX1_4: M_hex1_c + M_atp_c -> M_hex1_A_c; kf_HEX1_A*(M_atp_c*M_hex1_c - M_hex1_A_c/Keq_HEX1_A); R_HEX1_4 is "hex1-atp binding";
  R_HEX1_5: M_hex1_G_c + M__23dpg_c -> M_hex1_G_CI_c; kf_R_HEX1_5*(M__23dpg_c*M_hex1_G_c - M_hex1_G_CI_c/Keq_R_HEX1_5); R_HEX1_5 is "hex1_G-_23dpg binding";
  R_HEX1_6: M_hex1_G_c + M_atp_c -> M_hex1_AG_c; kf_HEX1_A*(M_atp_c*M_hex1_G_c - M_hex1_AG_c/Keq_HEX1_A); R_HEX1_6 is "hex1_G-atp binding";
  R_HEX1_7: M_hex1_A_c + M_glc__D_c -> M_hex1_AG_c; kf_HEX1_G*(M_glc__D_c*M_hex1_A_c - M_hex1_AG_c/Keq_HEX1_G); R_HEX1_7 is "hex1_A-glc__D binding";
  R_HEX1_8: M_hex1_AG_c -> M_hex1_c + M_adp_c + M_g6p_c + M_h_c; kf_HEX1*(M_hex1_AG_c - M_adp_c*M_g6p_c*M_hex1_c/Keq_HEX1); R_HEX1_8 is "hex1_AG catalyzation";
end
